*Heading
strain controlled viscoplastic TiAl at 1050C
*Node
      1,          -3.,           0.,          8.5
      2,           3.,           0.,          8.5
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** ----------------------------------------------------------------
*Element, type=C3D8
  1, 1179, 1246, 1194, 1248, 8179, 8246, 8194, 8248
  2, 1316, 1163,   75,   76, 8316, 8163, 1547, 1546
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** ----------------------------------------------------------------
*Elset, elset=Gamma
   403,   404,   405,   406,   407,   408
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*Elset, elset=R
     1,     2,     3,     4,     5,     6
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*Nset, nset=Origin
 805,
*Nset, nset=BoundarySurf
   27,   28,  796,  797,  798,  799
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** ----------------------------------------------------------------
 *Nset, nset=BLineX
  27,  28, 796, 797, 798, 799
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*Nset, nset=LoadSurf
    5,    6,  133,  134,  135,  136
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** ----------------------------------------------------------------
*Boundary, user
LoadSurf, 3, 3
*Boundary
BoundarySurf, 3, 3
BLineX, 2, 2
**142, 1, 2
Origin, PINNED
*elset, elset=Elem2k, generate
1, 2000
*elset, elset=Elem4k, generate
2001, 4000
*elset, elset=Elem6k, generate
4001, 6000
*elset, elset=Elem8k, generate
6001, 8000
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** ----------------------------------------------------------------
*Solid Section, elset=Gamma, material=TiAl
*Material, name=TiAl
*USER MATERIAL,CONSTANTS=160,UNSYMM
150000.,  76000., 150000.,  76000.,  76000., 153000.,  64000.,  82000.
  82000.,      0.,      0.,      0.,      0.,      0.,      0.,      0.
     0.,       0.,      0.,      0.,      0.,      0.,      0.,      0.
      2.,      0.,      0.,      0.,      0.,      0.,      0.,      0.
      1.,      1.,      1.,      1.,      1.,      0.,      0.,      0.
      0.,      0.,      1.,      1.,      1.,      0.,      0.,      0.
      0.,      0.,      0.,      0.,      0.,      0.,      0.,      0.
      0.,      0.,      1.,   0.42414861, 0.74434721,   0.515795684,
      1.,      0.,      0.,   0.8688421941,  -0.495089125,  0.0,
     4.5,     122.,     0.,     0.,      0.,      0.,      0.,      0.
     4.5,     122.,     0.,    0.,      0.,      0.,      0.,      0.
      0.,      0.,      0.,      0.,      0.,      0.,      0.,      0.
      0.,      0.,      0.,      0.,     14.,      10.,     9.,      0.
     .0,      .0,    3500.,    45.,     .24,      600.,     0.,      0.
      0.,      0.,      0.,      0.,     14.,      10.,     9.,      0.
     .0,      .0,    3500.,    45.,     .24,      600.,     0.,      0.
      0.,      0.,      0.,      0.,      0.,      0.,      0.,      0.
      0.,      0.,      0.,      0.,      0.,      0.,      0.,      0.
     0.5,      1.,      0.,      0.,      0.,      0.,      0.,      0.
      0.,     0.,   1e-05,      0.,      0.,      0.,      0.,      0.
*DEPVAR
159
** ----------------------------------------------------------------
*Solid Section, elset=R, material=TiAl2
*Material, name=TiAl2
*User Material, constants=160, unsymm
162000.,  73000., 162000.,  60000.,  60000., 180000.,  80000.,  60000.
  60000.,      0.,      0.,      0.,      0.,      0.,      0.,      0.
      0.,      0.,      0.,      0.,      0.,      0.,      0.,      0.
      2.,      0.,      0.,      0.,      0.,      0.,      0.,      0.
      1.,      1.,      1.,      1.,      1.,      0.,      0.,      0.
      0.,      0.,      1.,      1.,      1.,       0.,      0.,     0.
      0.,      0.,      0.,      0.,      0.,      0.,      0.,      0.
      0.,      0.,      1.,   0.42414861, 0.74434721,   0.515795684,
      1.,      0.,      0.,   0.8688421941,  -0.495089125,  0.0,
     4.5,     122.,     0.,     0.,      0.,      0.,      0.,      0.
     4.5,     122.,     0.,    0.,      0.,      0.,      0.,      0.
      0.,      0.,      0.,      0.,      0.,      0.,      0.,      0.
      0.,      0.,      0.,      0.,     14.,      10.,     9.,      0.
     .0,      .0,    3500.,    45.,     .24,      600.,     0.,      0.
      0.,      0.,      0.,      0.,     14.,      10.,     9.,      0.
     .0,      .0,    3500.,    45.,     .24,      600.,     0.,      0.
      0.,      0.,      0.,      0.,      0.,      0.,      0.,      0.
      0.,      0.,      0.,      0.,      0.,      0.,      0.,      0.
     0.5,      1.,      0.,      0.,      0.,      0.,      0.,      0.
      0.,     0.,   1e-05,       0.,      0.,      0.,      0.,      0.
*Depvar
    159,
** ----------------------------------------------------------------
** n=3.9-4, K=980-1100, c=approx 5000, d= around 70, phi0=.45-.5, delta=45-50 r=10, Q=-10. b=around 10 te curve stable and motamuti flat
** b joto bare toto hard, shudu last part change hoy
** c, delta joto bara toto soft, pura curve change hoy
** phi0,d barale softening kome curve er flatness bare
** softening is highly sensitive to delta,
**phi0 <1 ei better result ashche,
** next>> adot thik kore c,d dhorte hobe
** r calculation e jhamela ase, b 0 hoile vulta avoid kora jay...
** STEP: Step-1
**
*STEP,INC=1000,nlgeom=yes
*STATIC
0.0005,50.0,0.0001,.5
*Restart, write, frequency=5
*Output, field, variable=PRESELECT
*ELEMENT OUTPUT
SDV
*End Step
** ----------------------------------------------------------------
**n 3.9 3.6 adot .14, c 25, d 2000 e curve softening nai, 70 e giye flat, d 3500 korleo flat but 55 te neme ashe
** n 3.9 e analsis more stable than 4.1
** shesh chesta, 10-4 rate e best fit kore  onno rate e applz kora jay
**taus komle softening valo hoy
** c 10 5 d 2500 2000 hole analysis smooth, c d komle stability kome jay, barale curvature valo hoy
** q q1 negative holei dekhi analysis smooth hoy
**
**Lattice orientation 3 (Latest)
**      0.,      0.,      1.,   0.42414861, 0.74434721,   0.515795684,
**      1.,      0.,      0.,   0.8688421941,  -0.495089125,  0.0,
***                    OR
**      0.,      0.,      1.,   0.74434721,    0.42414861,    0.515795684,
**      0.,      1.,      0.,   -0.495089125,  0.8688421941,    0.0,
**Lattice orientation 2 (modified)
**      0.,      0.,      1.,   0.4091, 0.727,   0.5821,
**      1.,      0.,      0.,   0.435,  -0.2447847,  0.0,
**Lattice orientation 1, older
**     0.,      0.,      1.,   0.727, -0.4091,  0.5821,
**     0.,      1.,      0.,   -0.55, 0.18496,  0.8169,
**n er man >4 kore deka jete pare, may be no need
** 10-3 er jonno current set diye 10-5 test koro with arbitrary adot, kasakasi pawa jay kina tar jonno>> na
** lattice orientation change kore dekha jete pare >>> result bohut different
** h h0 q q1 all positive hole hardening , all negative hole softening
**adot, c d phi0 delta change kore duta lower rate er curve approx fit korte hobe, then n=4 dhore eki kaj
**adot gamma te kom r e beshi thakle analysis stable hoy
** dui deltar gap 80-120 reasonable, gap barle softening valo hoy
** phi0 duitar gap joto kom curve toto soft hobe shesher dike, difference 5.0-9.0 is ok
** phi0 barle delta barbe,
**c joto beshi phi0 toto beshi hobe, d toto kombe, nahole curve zigzag hoy
** ----------------------------------------------------------------
**C=9~15, d=1500~2500, phi0=2~2.5, delta=200~250
**c=5~35. d=500~2500, >2500 untested. phi0=2~3 ok, 5 e unstable, <2 untested. delta=100~300 but <100 untested
**phi0 2 theke 3 er moddhe hobe mone hosse, 5 hole unstable
** delta 1000 e analysis unstable, 300 hole little zigzaging starts
** c10 d 1500 hole S33 48 e chole ashe, 2000 hole 44 e ashe
** c 10 hole d 600 teo stable, curve better with high S33 92, d 500 teo stable with highest S33 87
** seems c 10 to 35 e analysis stable
** c 35 theke 25 e nile d 800 teo motamuti smooth, c d 25 800 te curve shape nice, but high value of 105 MPa
** d=1 hole S33 t=0,10,50 te 90 degree hoye straight line hoy, d=100 te run kore na, 200, 500 te high zigzag, 800 te kisuta kom
**n adot h0 q q1 C d phi delta 3.2 .00004 100 0 0 50 1200 2 100 >>curve kisuta zigzag, C<=35 hole smooth
**n adot h0 q q1 C d phi delta 3.2 .00004 100 0 0 100 1500 2 100 >>curve abar fully zigzag
**n adot h0 q q1 C d phi delta 3.2 .00003 100 0 0 10 1500 2 100 >>curve ager theke kisuta better, smooth
**n adot h0 q q1 C d phi delta 3 .00003 100 0 0 5 1000 2 50 >>curve ager theke kisuta better, smooth
**n adot h0 q q1 C d phi delta 3 .00003 100 0 0 1 1000 2 50 >>curve ager moto but runs smooth with 100 sec, X curve o duita chara shob smooth
**n adot h0 q q1 C d phi delta 3 .00003 -10 0 0 1 500 2 50 >>curve ager moto but runs smooth with 50 sec
**active SS are 3,4,5
**C=.01 dile n=3 teo run kore with no major change in the curve
